! ===========================================================================
! Standardized FEM-computed LineCodes for LV Cable Networks
! Method: LineCableModels.jl — Darwin impedance + Electrodynamics admittance
! Earth:  ρ=100 Ω·m, εᵣ=1, μᵣ=1 | f=50 Hz | burial depth=1.0 m
! Units:  Ω/km (R, X), capacitance set to zero (C=0)
!
! Two linecodes retained for all feeders:
!   Single-phase (phases=2): NAYCY_1x16_RE_16
!   Three-phase  (phases=4): NAYCWY_4x95_SE_50
! ===========================================================================

! cable design: NAYCY_1x16_RE_16
New LineCode.NAYCY_1x16_RE_16 nphases=2 Units=km
~ Rmatrix=(2.107688736150469 0.03267802431917551 | 0.03267802431917551 1.222291155205211)
~ Xmatrix=(0.8051607875752146 0.7634566497044654 | 0.7634566497044654 0.7638973773816128)
~ Cmatrix=(0.0 0.0 | 0.0 0.0)

! cable design: NAYCWY_4x95_SE_50
New LineCode.NAYCWY_4x95_SE_50 nphases=4 Units=km
~ Rmatrix=(0.5752788461627556 0.2921976899577795 0.29064211295645226 0.2922015015420132 | 0.2921976899577795 0.5750209508996461 0.29172700905379456 0.2907870810975797 | 0.29064211295645226 0.29172700905379456 0.5742778643972282 0.29173079407992536 | 0.2922015015420132 0.2907870810975797 0.29173079407992536 0.5750287419935048)
~ Xmatrix=(0.22692347433770027 0.07228845605265528 0.0539911569409152 0.07228514131123202 | 0.07228845605265528 0.227798823497906 0.07349955999687713 0.05361715834131565 | 0.0539911569409152 0.07349955999687713 0.22934985476172018 0.07349622223408012 | 0.07228514131123202 0.05361715834131565 0.07349622223408012 0.22779313436136558)
~ Cmatrix=(0.0 0.0 0.0 0.0 | 0.0 0.0 0.0 0.0 | 0.0 0.0 0.0 0.0 | 0.0 0.0 0.0 0.0)
